# OpenSim document version 30000
Model threelink:
  length_units: meters
  force_units: N
  gravity: 0 -9.80665 0
  credits:
    Frank Anderson, Peter Loan, Ayman Habib, Ajay Seth, Michael Sherman
  BodySet:
    Body ground: mass=0 mass_center=(0 0 0) inertia_xx=1 inertia_yy=1 inertia_zz=1 meshes=box.vtp
    Body link1: mass=1 mass_center=(1 0 0) inertia_xx=1 inertia_yy=1 inertia_zz=1 meshes=box.vtp
      PinJoint joint1: parent_body=ground location_in_parent=(0 0 0) orientation_in_parent=(-1.570796 0 0)
          location=(0 0 0) orientation=(-1.570796 0 0)
        Coordinate q1: motion_type=rotational
    Body link2: mass=1 mass_center=(0.5 0 0) inertia_xx=1 inertia_yy=1 inertia_zz=1 meshes=box.vtp
      PinJoint joint2: parent_body=link1 location_in_parent=(0 1 0) location=(0 0 0)
        Coordinate q2: motion_type=rotational
    Body link3: mass=1 mass_center=(0.5 0 0) inertia_xx=1 inertia_yy=1 inertia_zz=1 meshes=box.vtp
      PinJoint joint3: parent_body=link2 location_in_parent=(0.5 0 0) location=(0 0 0)
        Coordinate q3: motion_type=rotational
    Body link4: mass=1 mass_center=(0.2 0 0) inertia_xx=1 inertia_yy=1 inertia_zz=1 meshes=box.vtp
      PinJoint joint4: parent_body=link3 location_in_parent=(0.5 0 0) location=(0 0 0)
        Coordinate q4: motion_type=rotational
  ForceSet:
    CoordinateActuator q1: coordinate=q1
    CoordinateActuator q2: coordinate=q2
    CoordinateActuator q3: coordinate=q3
    CoordinateActuator q4: coordinate=q4
